Control Stream Name: Bellanti_BJCP_2014_Run_2.ctl
Data File Name: BellantiRun2REP1.csv
Mix File Name:
Output File Name: BellantiRun2
Table File Name: sdtab
Job Started: Wed Jan 18 12:08:01 2017
Job Completed: Wed Jan 18 12:08:02 2017

**************************************************
Control Stream Contents : Bellanti_BJCP_2014_Run_2.ctl
**************************************************
;Model Desc: 1 CMT EV LINEAR W/ LAG
;Project Name: NCAC SIMS
;Author: JK
;QC:

$PROB RUN# SIM Bellanti

;************************************************************
;****                   DATASET                          ****
;************************************************************
$INPUT C ID TRT TIME TAD DOSE AMT SS II DV MDV EVID CMT SEX

$DATA NMDATA IGNORE=@ ; BELLANTIRUN1REP1

; C:    Comment (Any row starting with a 'C' will be ignored)
; ID:   NONMEM Subject Identification Number
; TIME: Actual Time Field
; AMT:  Oral Dosage Amount Data Item (mg)
; DV:   Dependent Variable (mg/L)
; EVID: Event Identification (0 = Obs, 1 = Dosing)
; MDV:  Missing Dependent Variable (0 = Value, 1 = Missing)
; ADDL: Additional number of doses given after the first dosing record
; II:   Dosing Interval
; SEX:  GENDER (0 = FEMALE, 1 = MALE)

;************************************************************
;****         PHARMACOKINETIC POPULATION MODEL           ****
;************************************************************

$SUBROUTINE ADVAN2 TRANS2

$PK

TVKA  = THETA(1)            ; POPULATION ABSORPTION CONSTANT
GPKA  = TVKA
PPVKA = EXP(ETA(3))
KA    = GPKA * PPVKA        ; INDIVIDUAL ABSORPTION CONSTANT

TVCL  = THETA(2)            ; POPULATION CLEARANCE
GPCL  = TVCL
PPVCL = EXP(ETA(1))
CL    = GPCL * PPVCL        ; INDIVIDUAL CLEARANCE

IF(SEX.EQ.0)TVV = THETA(3)  ; FEMALE CENTRAL VOLUME
IF(SEX.EQ.1)TVV = THETA(4)  ; MALE CENTRAL VOLUME
GPV   = TVV
PPVV  = EXP(ETA(2))
V     = GPV * PPVV          ; INDIVIDUAL CENTRAL VOLUME

ALAG1 = THETA(5)            ; LAG TIME INTO ABSORPTION COMPARTMENT


;------------------------------------------------------------
;----           TIME AFTER DOSE CALCULATION              ----
;------------------------------------------------------------

;------------------------------------------------------------
;----           SECONDARY MODEL PARAMETERS               ----
;------------------------------------------------------------

   K10  = CL/V
   T12  = 0.693/K10
   MRT  = 1/K10
   AREAF = DOSE/CL ; Doesn't account for bioavailabilty
   AUMC = AREAF*MRT
   VSSF  = V

;------------------------------------------------------------
;----               RESIDUAL ERROR MODEL                 ----
;------------------------------------------------------------
$ERROR

W = 2.4
IPRE=F
Y    = F + W*EPS(1)
IRES = DV-IPRE
IWRE = IRES/IPRE

;************************************************************
;****           INITIAL PARAMETER ESTIMATES              ****
;************************************************************

$THETA
8.2           ; TV KA (1/HR)
30.8          ; CLEARANCE (L/HR) CL
65.3          ; FEMALE VOLUME (L)
78.4          ; MALE VOLUME (L)

.146         ; LAG TIME (1/HR)

$OMEGA BLOCK (2)

.0554        ; [E] BETWEEN SUBJECT VARIABILITY (CL/F)

.0339 0.245  ; [E] BETWEEN SUBJECT VARIABILITY (V/F)

$OMEGA

.689         ; [E] BETWEEN SUBJECT VARIABILITY (KA)

$SIGMA

.00566       ; [P] PROPORTIONAL RESIDUAL ERROR

;************************************************************
;****        ESTIMATION AND SIMULATION ROUTINES          ****
;************************************************************

$SIM ONLYSIM (3773315)

$TABLE ID TIME SEX II AMT DOSE DV CMT EVID PRED MDV IWRE IRES
IPRE CL V T12 MRT AREAF AUMC VSSF ETA1 ETA2 ETA3
NOPRINT ONEHEADER FILE=sdtab

Wed Jan 18 12:08:02 EST 2017
;Model Desc: 1 CMT EV LINEAR W/ LAG
;Project Name: NCAC SIMS
;Author: JK
;QC:

$PROB RUN# SIM Bellanti

;************************************************************
;****                   DATASET                          ****
;************************************************************
$INPUT C ID TRT TIME TAD DOSE AMT SS II DV MDV EVID CMT SEX

$DATA NMDATA IGNORE=@ ; BELLANTIRUN1REP1

; C:    Comment (Any row starting with a 'C' will be ignored)
; ID:   NONMEM Subject Identification Number
; TIME: Actual Time Field
; AMT:  Oral Dosage Amount Data Item (mg)
; DV:   Dependent Variable (mg/L)
; EVID: Event Identification (0 = Obs, 1 = Dosing)
; MDV:  Missing Dependent Variable (0 = Value, 1 = Missing)
; ADDL: Additional number of doses given after the first dosing record
; II:   Dosing Interval
; SEX:  GENDER (0 = FEMALE, 1 = MALE)

;************************************************************
;****         PHARMACOKINETIC POPULATION MODEL           ****
;************************************************************

$SUBROUTINE ADVAN2 TRANS2

$PK

TVKA  = THETA(1)            ; POPULATION ABSORPTION CONSTANT
GPKA  = TVKA
PPVKA = EXP(ETA(3))
KA    = GPKA * PPVKA        ; INDIVIDUAL ABSORPTION CONSTANT

TVCL  = THETA(2)            ; POPULATION CLEARANCE
GPCL  = TVCL
PPVCL = EXP(ETA(1))
CL    = GPCL * PPVCL        ; INDIVIDUAL CLEARANCE

IF(SEX.EQ.0)TVV = THETA(3)  ; FEMALE CENTRAL VOLUME
IF(SEX.EQ.1)TVV = THETA(4)  ; MALE CENTRAL VOLUME
GPV   = TVV
PPVV  = EXP(ETA(2))
V     = GPV * PPVV          ; INDIVIDUAL CENTRAL VOLUME

ALAG1 = THETA(5)            ; LAG TIME INTO ABSORPTION COMPARTMENT


;------------------------------------------------------------
;----           TIME AFTER DOSE CALCULATION              ----
;------------------------------------------------------------

;------------------------------------------------------------
;----           SECONDARY MODEL PARAMETERS               ----
;------------------------------------------------------------

   K10  = CL/V
   T12  = 0.693/K10
   MRT  = 1/K10
   AREAF = DOSE/CL ; Doesn't account for bioavailabilty
   AUMC = AREAF*MRT
   VSSF  = V

;------------------------------------------------------------
;----               RESIDUAL ERROR MODEL                 ----
;------------------------------------------------------------
$ERROR

W = 2.4
IPRE=F
Y    = F + W*EPS(1)
IRES = DV-IPRE
IWRE = IRES/IPRE

;************************************************************
;****           INITIAL PARAMETER ESTIMATES              ****
;************************************************************

$THETA
8.2           ; TV KA (1/HR)
30.8          ; CLEARANCE (L/HR) CL
65.3          ; FEMALE VOLUME (L)
78.4          ; MALE VOLUME (L)

.146         ; LAG TIME (1/HR)

$OMEGA BLOCK (2)

.0554        ; [E] BETWEEN SUBJECT VARIABILITY (CL/F)

.0339 0.245  ; [E] BETWEEN SUBJECT VARIABILITY (V/F)

$OMEGA

.689         ; [E] BETWEEN SUBJECT VARIABILITY (KA)

$SIGMA

.00566       ; [P] PROPORTIONAL RESIDUAL ERROR

;************************************************************
;****        ESTIMATION AND SIMULATION ROUTINES          ****
;************************************************************

$SIM ONLYSIM (3773315)

$TABLE ID TIME SEX II AMT DOSE DV CMT EVID PRED MDV IWRE IRES
IPRE CL V T12 MRT AREAF AUMC VSSF ETA1 ETA2 ETA3
NOPRINT ONEHEADER FILE=sdtab

NONLINEAR MIXED EFFECTS MODEL PROGRAM (NONMEM)    DOUBLE PRECISION NONMEM    VERSION VI LEVEL 1.0
DEVELOPED AND PROGRAMMED BY STUART BEAL AND LEWIS SHEINER

PROBLEM NO.:         1
RUN# SIM Bellanti
TOT. NO. OF OBS RECS:     620
TOT. NO. OF INDIVIDUALS:   20
ONE COMPARTMENT MODEL WITH FIRST-ORDER ABSORPTION (ADVAN2)
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SIMULATION STEP PERFORMED
